V1 := C1/P1*Ke  # error: Эта переменная неопределена.
V1*Pp*Ke - C1*Kp solve, Pp → Kp*P1/Ke^2
V1*Pp*Ke - C1*Kp solve, P1 → Ke^2*Pp/Kp
V2 := C2/P2*Ke  # error: Эта переменная неопределена.
V3 := C3/P3*Ke  # error: Эта переменная неопределена.
(V1 + V2)*Pp*Ke - (C1 + C2)*Kp solve, P2 → -C2*Ke/(C1*Ke/P1 - Kp*(C1 + C2)/(Ke*Pp))
(V1 + V2)*Pp*Ke - (C1 + C2)*Kp solve, Pp → Kp*(C1 + C2)/(Ke*(C1*Ke/P1 + C2*Ke/P2))
(V1 + V2 + V3)*Pp*Ke - (C1 + C2 + C3)*Kp solve, Pp → Kp*(C1 + C2 + C3)/(Ke*(C1*Ke/P1 + C2*Ke/P2 + C3*Ke/P3))
(V1 + V2 + V3)*Pp*Ke - (C1 + C2 + C3)*Kp solve, P3 → -C3*Ke/(C1*Ke/P1 + C2*Ke/P2 - Kp*(C1 + C2 + C3)/(Ke*Pp))
Ke := 0.996
Kp := 1.01
P1 := 19000
C1 := 10
V1 := C1/P1*Ke = 0.000524211
V1*Pp*Ke - C1*Kp solve, Pp → 19344.4460573
C2 := 20
V2 := C2/P2*Ke  # error: Эта переменная неопределена.
Pp := P1
(V1 + V2)*Pp*Ke - (C1 + C2)*Kp solve, P2 → 18497.0088087
sell_rate := P1 = 19000
volume1 := C1/P1*Ke = 0.000524211
sell_cost := C1 + C2 = 30
rate2 := -((C2*Ke)/(volume1 - ((Kp*sell_cost)/(sell_rate*Ke)))) = 18497
