C1 := Q1*R1*Kes  # error: Эта переменная неопределена.
C2 := Q2*R2*Kes  # error: Эта переменная неопределена.
C3 := Q3*R3*Kes  # error: Эта переменная неопределена.
(C1 + C2) - (Q1*Reve*Kes) - (Q2*Reve*Kes) solve, Reve → (Q1*R1 + Q2*R2)/(Q1 + Q2)
(Q1 + Q2)*Kp - ((C1 + C2)/Rb)*Keb solve, R2 → (Kp*Q1*Rb + Kp*Q2*Rb - Keb*Kes*Q1*R1)/(Keb*Kes*Q2)
(Q1 + Q2 + Q3)*Kp - ((C1 + C2 + C3)/Rb)*Keb solve, R3 → Rb*(Kp*(Q1 + Q2 + Q3) - Keb*(Kes*Q1*R1 + Kes*Q2*R2)/Rb)/(Keb*Kes*Q3)
